# Лабораторная работа 7 "Решение задачи Коши для ОДУ 1-го порядка".
# Гордеев Никита, группа 22307, вариант 7
# ДАНО:
# уравнение
a := π/4  # начальная точка интервала
b := 1
# конечная точка интервала
X[0] := 1  # начальное условие приближенного решения
# ЭТАП 1: ПРИВЕДЕНИЕ УРАВНЕНИЯ К НОРМАЛЬНОЙ ФОРМЕ
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F(t, u) := 1/(1 + u^2)
# ЭТАП 2: ЯВНАЯ РАЗНОСТНАЯ СХЕМА ЭЙЛЕРА
n := 5000  # Количество шагов
k := 0 .. n - 1  # Итерационная переменная
h := (b - a)/n  # Шаг метода
t[k] := a + k*h
X[k + 1] := X[k] + h*F(t[k], X[k])  # Значение правой части уравнения в текущей точке
# [plot: X[k] vs t[k]]
Y[0] := 1
# Начальное условие для приближенного решения
n := 2*n  # Удвоенное количество шагов для оценки погрешности
h := (b - a)/n
# Новый шаг метода после удвоения шага
k := 0 .. n - 1  # Итерационная переменная для нового числа шагов
t[k] := a + k*h
Y[k + 1] := Y[k] + h*F(t[k], Y[k])  # Реализация явной разностной схемы Эйлера
m := 0 .. n/2
# Итерационная переменная для оценки погрешности
Z1[m] := |X[m] - Y[2*m]|  # Разность между значениями приближенного решения на двух шагах для оценки погрешности
max(Z1) = 4.93163e-7  # Оценка погрешности метода Рунге
# ЭТАП 3: РАЗНОСТНАЯ СХЕМА ЭЙЛЕРА-КОШИ
n := 100
# Количество шагов разбиения интервала
h := (b - a)/n  # Шаг метода
k := 0 .. n - 1  # Итерационная переменная
t[k] := a + k*h
δ := 1/2
X1[0] := 1  # Начального условия приближенного решения
X1[k + 1] := X1[k] + h/2*(F(t[k], X1[k]) + F(t[k + 1], X1[k] + h*F(t[k], X1[k])))  # явной разностной схемы Эйлера
# [plot: X1[k] vs t[k]]
X1 = [
    1; 1.00107; 1.00214; 1.00321; 1.00428; 1.00535; 1.00642; 1.00748; 1.00855; 1.00961
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]
# ЭТАП 4: ИСПОЛЬЗОВАНИЕ ФУНКЦИИ MATHCAD RKFIXED
j := 0 .. n  # Итерационная переменная
s := 1  # Текущее значение
n := 100  # Количество шагов разбиения
D(t, s) := F(t, s)  # Функция, описывающая изменение переменной s
W := rkfixed(s, a, b, n, D)  # Результат численного решения уравнения с использованием функции
# [plot: W[k, 1] vs t[k]]
W = [
    0.785398, 1;
    0.787544, 1.00107;
    0.78969, 1.00214;
    0.791836, 1.00321;
    0.793982, 1.00428;
    0.796128, 1.00535;
    0.798274, 1.00642;
    0.80042, 1.00748;
    0.802566, 1.00855;
    0.804712, 1.00961
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]
# ЭТАП 5: ВЫЧИСЛЕНИЕ РАЗНОСТИ И СРАВНЕНИЕ С ОЦЕНКОЙ ПОГРЕШНОСТИ
R1[j] := |X1[j] - W[j, 1]|
max(R1) = 7.99127e-9
# [plot: |X1[k] - W[k, 1]| vs t[k]]
R1 = [
    0; 1.02675e-10; 2.048e-10; 3.0638e-10; 4.07416e-10; 5.07912e-10; 6.07872e-10; 7.07298e-10; 8.06193e-10; 9.04561e-10
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]
